units		si
atom_style	granular
atom_modify	map array

communicate	single vel yes

boundary	p f f
newton		off

processors * * *
region		box block 0. 2. 0. 2. 0. 2. units box
create_box	1 box

variable	skin equal 0.01
neighbor	${skin} bin
neigh_modify	delay 0 binsize 0.01 one 1000

fix grav all gravity 0.0 vector 0 0 -1


fix 		m1 all property/global youngsModulus peratomtype 1e8
fix 		m2 all property/global poissonsRatio peratomtype 0.4
fix 		m3 all property/global coefficientRestitution peratomtypepair 1 0.95
fix 		m4 all property/global coefficientFriction peratomtypepair 1 0.45
fix 		m5 all property/global coefficientRollingFriction peratomtypepair 1 0.020

# lb coupling fix
fix lbcoupling all couple/lb/onetoone


pair_style	gran model hertz tangential history rolling_friction cdt
pair_coeff	* *

fix		1 all nve/sphere

#fix xwalls1 all wall/gran model hertz tangential history primitive type 1 xplane 0.
#fix xwalls2 all wall/gran model hertz tangential history primitive type 1 xplane 2.
fix ywalls1 all wall/gran model hertz tangential history primitive type 1 yplane 0.
fix ywalls2 all wall/gran model hertz tangential history primitive type 1 yplane 2.
fix zwalls1 all wall/gran model hertz tangential history primitive type 1 zplane 0.
fix zwalls2 all wall/gran model hertz tangential history primitive type 1 zplane 2.

#create_atoms 1 single 0.75 0.1 0.1
#create_atoms 1 single 0.38 0.05 0.05

#set group all diameter 0.04 density 1000


#fix pts1 all particletemplate/sphere 15485863 atom_type 1 density constant 1000 radius constant 0.015
#fix pts2 all particletemplate/sphere 15485863 atom_type 1 density constant 1000 radius constant 0.01
fix pts1 all particletemplate/sphere 15485863 atom_type 1 density constant 1100 radius constant ${r_part}

fix pdd1 all particledistribution/discrete 15485867  1 pts1 1.0
#fix pdd2 all particledistribution/discrete 15485867  2 pts2 0.2 pts3 0.8

region  insreg block 0.0 2.0 0.0 2.0 0.0 2.0 units box


#fix ins all insert/pack seed 32452843 distributiontemplate pdd1 insert_every once &
#                         overlapcheck yes particles_in_region 350 region insreg ntry_mc 10000
fix ins all insert/pack seed 32452843 distributiontemplate pdd1 insert_every once &
                        overlapcheck yes volumefraction_region ${v_frac} region insreg ntry_mc 10000
#fix ins all insert/pack seed 32452843 distributiontemplate pdd2 insert_every once &
#                        overlapcheck yes volumefraction_region 0.05 region insreg ntry_mc 10000
#fix ins all insert/pack seed 32452843 distributiontemplate pdd1 insert_every once &
#                        overlapcheck yes particles_in_region 1 region insreg ntry_mc 10000


run 1
